1.
g(x) := ln(x^2 - 1)
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a_1 := 2
a_2 := -2
z_1 := root(g(a_1), a_1) = 1.41421
z_2 := root(g(a_2), a_2) = -1.41421
g(z_1) = -1.20862e-9
g(z_2) = -1.20862e-9
2.
f(x) := 1 - x
k(x) := -x^2 + |x| + 5
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3.
x := -0.618
y := -0.618
z := 0.618
Given
x + y/z == 1/x
y + x/z == 1/y
z + x/y == 1/z
Find(z, x, y) = [0.618034; -0.618034; -0.618034]
4.
h(x) := x^ln(x - 1)
f(x) := ln(x - 1)^x
o := integral(h(x) - f(x), x = 2 .. 6)
o = 10.726
5.
Given
1i*z_1 + 3*z_2 == 7*1i, 4*z_1 + 2*1*i*z_2 == 5*1i
Find(z_1, z_2) = [1.41421; -1.41421]
# матричные преобразования
1.
i := 1 .. 5
A[i - 1, i - 1] := i
A = [1, 0, 0, 0, 0; 0, 2, 0, 0, 0; 0, 0, 3, 0, 0; 0, 0, 0, 4, 0; 0, 0, 0, 0, 5]
2.
j1 := 1, 3 .. 5
j2 := 2, 4 .. 4
i := 1 .. 7
B[j1 - 1, i - 1] := 2
B[j2 - 1, i - 1] := 1
B = [
    2, 2, 2, 2, 2, 2, 2;
    1, 1, 1, 1, 1, 1, 1;
    2, 2, 2, 2, 2, 2, 2;
    1, 1, 1, 1, 1, 1, 1;
    2, 2, 2, 2, 2, 2, 2
]
3.
i1 := 1, 3 .. 7
i2 := 2, 4 .. 6
j1 := 1, 3 .. 5
j2 := 2, 4 .. 4
j := 1 .. 5
B[j - 1, i1 - 1] := B[j - 1, i1 - 1] + 2.2
B[j - 1, i2 - 1] := B[j - 1, i2 - 1] + 3.3
B = [
    4.2, 5.3, 4.2, 5.3, 4.2, 5.3, 4.2;
    3.2, 4.3, 3.2, 4.3, 3.2, 4.3, 3.2;
    4.2, 5.3, 4.2, 5.3, 4.2, 5.3, 4.2;
    3.2, 4.3, 3.2, 4.3, 3.2, 4.3, 3.2;
    4.2, 5.3, 4.2, 5.3, 4.2, 5.3, 4.2
]
4.
M := mean(B) = 4.27143
5.
i := 1 .. 7
B[j - 1, i - 1] := B[j - 1, i - 1] - M
B = [
    -0.0714286, 1.02857, -0.0714286, 1.02857, -0.0714286, 1.02857, -0.0714286;
    -1.07143, 0.0285714, -1.07143, 0.0285714, -1.07143, 0.0285714, -1.07143;
    -0.0714286, 1.02857, -0.0714286, 1.02857, -0.0714286, 1.02857, -0.0714286;
    -1.07143, 0.0285714, -1.07143, 0.0285714, -1.07143, 0.0285714, -1.07143;
    -0.0714286, 1.02857, -0.0714286, 1.02857, -0.0714286, 1.02857, -0.0714286
]
6.
A := [
    1, 0, 0, 0, 0, 1, 1;
    0, 2, 0, 0, 0, 1, 1;
    0, 0, 3, 0, 0, 1, 1;
    0, 0, 0, 4, 0, 1, 1;
    0, 0, 0, 0, 5, 1, 1
]
7.
C := A + B = [
    0.928571, 1.02857, -0.0714286, 1.02857, -0.0714286, 2.02857, 0.928571;
    -1.07143, 2.02857, -1.07143, 0.0285714, -1.07143, 1.02857, -0.0714286;
    -0.0714286, 1.02857, 2.92857, 1.02857, -0.0714286, 2.02857, 0.928571;
    -1.07143, 0.0285714, -1.07143, 4.02857, -1.07143, 1.02857, -0.0714286;
    -0.0714286, 1.02857, -0.0714286, 1.02857, 4.92857, 2.02857, 0.928571
]
8.
D := C[:, 2]
D := augment(D, C[:, 3])
D := augment(D, C[:, 4])
D := augment(D, C[:, 5])
D := augment(D, C[:, 6])
D = [
    -0.0714286, 1.02857, -0.0714286, 2.02857, 0.928571;
    -1.07143, 0.0285714, -1.07143, 1.02857, -0.0714286;
    2.92857, 1.02857, -0.0714286, 2.02857, 0.928571;
    -1.07143, 4.02857, -1.07143, 1.02857, -0.0714286;
    -0.0714286, 1.02857, 4.92857, 2.02857, 0.928571
]
9.
V := D^-1
V = [
    -0.333333, 0, 0.333333, 0, 0;
    0, -0.25, 0, 0.25, 0;
    -0.2, 0, 0, 0, 0.2;
    -0.419913, 0.866883, 0.30303, -0.0227273, 0.181818;
    1.95325, -1.61688, -0.636364, -0.227273, -0.381818
]
10.
|D| = -66
# ЛИнейная алгебра
A := [-3, 2, 4; 2, -7, 7; 3, -5, 2]
B := [4; -2; 4]
C := B*A^-1  # error: Размерности массива не совпадают.
